i := -1 .. 10
ii := -1, 1 .. 10
i = [-1; 0; 1; 2; 3; 4; 5; 6; 7; 8; 9; 10]
ii = [-1; 1; 3; 5; 7; 9]
35 + 2*7/13 = 36.0769
sqrt(sin(π/5) + 4)/(ln(e^5) + 3)^2 = 0.0334674
sqrt(sin(π/5) + 4)/(ln(e^5) + 3)^2 → sqrt(sqrt(2)*sqrt(5 - sqrt(5))/4 + 4)/64
[3, -1; -5, 7]^-1 = [0.4375, 0.0625; 0.3125, 0.1875]
[3, -1; -5, 7]^-1 → [7/16, 1/16; 5/16, 3/16]
a := -1
integral(1/(1 + x^2), x = 0 .. 3/2) = 0.982794
integral(1/(1 + x^2), x = 0 .. 3/2) → atan(3/2)
b := 3
f(x) := x^2
y(x) := x - 1
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(3 + 7*1i)/(8 - 5*1i) → -11/89 + 71/89*1i
(3 + 7*1i)/(8 - 5*1i) = -0.123596 + 0.797753i
a := 4
f(x) := x^2
area(r) := π*r^2
r := 7
side(r) := sqrt(area(r))
x := 3
π*r^2 = 153.938
f(x) = 9
g(y) := f(y) + 6
g(x) = 15
log(1347.2)*sin(3/5*π) = 2.97627
f(x) := sin(x)/(x/a)
f(10) = -0.217608
