# Вариант 5
1.
a1 := 0.2456  # Приближенное значение a
Δa := 0.0005  # Абсолютная погрешность a
δa := Δa/a1  # Относительная погрешность a
b1 := 0.078  # Приближенное значение b
Δb := 0.003  # Абсолютная погрешность b
δb := Δb/b1  # Относительная погрешность b
c1 := 8  # Приближенное значение c
Δc := 0.25  # Абсолютная погрешность c
δc := Δc/c1  # Относительная погрешность c
f(a, b, c) := sqrt((c + b - a)^3)/(b*nthroot(c^3 + b, 3))
f1 := f(a1, b1, c1)
f1 = 35.1266  # Значение аналитического выражения
Δf(a, b, c) := |d/da(f(a, b, c))|*Δa + |d/db(f(a, b, c))|*Δb + |d/dc(f(a, b, c))|*Δc
Δf1 := Δf(a1, b1, c1)
Δf1 = 1.91853  # Абсолютная погрешность сложной функции
δf(a, b, c) := ((|a*(d/da(ln(f(a, b, c))))|*δa) + (|b*(d/db(ln(f(a, b, c))))|*δb) + (|c*(d/dc(ln(f(a, b, c))))|*δc))*100
δf1 := δf(a1, b1, c1)
δf1 = 5.46175  # %  # Относительная погрешность сложной функции
2.
Δ := Δf1
ω := 0.75
n := 1
β := 10
Δ ≤ ω*β[:, n - k + 1]
1.919 ≤ 0.75*10[:, 2 - k]
1.919/0.75 ≤ 10^(2 - k)
log(1.919/0.75) ≤ 2 - k
k ≤ 2 - log(1.919/0.75)  # следовательно  # тк
log(1.919/0.75) = 0.408014
k ≤ 1
# Значит верными цифрами аналитического выражения является только 1 значащая цифра, т.е. 3
3.
# Точность вычислений определяется количеством цифр результата,
# заслуживающих доверия.
# Характеристиками доверия к цифрам результата
# являются значащие, верные и сомнительные цифры
# У результата первого равенства больше значащих цифр, чем у результата второго. Основываясь на этом факте уже можно предположить, что первое выражение будет точнее второго.
14/17  # =
0.823
sqrt(58)
# =
7.61
Δ2 := |sqrt(58) - 7.61|
Δ1 := |14/17 - 0.823|
Δ1 = 0.000529412
Δ2 = 0.00577311  # Абсолютная погрешность выражения
δ1 := Δ1/0.823*100
δ2 := Δ2/7.61*100
δ1 = 0.0643271  # %
δ2 = 0.0758621  # %  # Относительная погрешность выражения
# Тк δ1<δ2 первое выражение  более точное | 14/17 | = | 0.823
