1.
a := 2
b := 8
h := 0.6
f(x) := (1 + 0.5*x)/(1 + sqrt(0.8*x^2 + 1.4))
df(x) := d/dx((1 + 0.5*x)/(1 + sqrt(0.8*x^2 + 1.4)))
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2.
grid_of_nodes := a, a + h .. b
grid_of_nodes = [2; 2.6; 3.2; 3.8; 4.4; 5; 5.6; 6.2; 6.8; 7.4; 8]
3.
sum_for :=
    res ← 0
    for x ∈ grid_of_nodes
        res ← res + f(x)
    res
sum_for = 6.84553
4.
sum_while :=
    res ← 0
    x ← a
    while x ≤ b
        res ← res + f(x)
        x ← x + h
    res
sum_while = 6.84553
5.
sum_if(q) :=
    res ← f(q) + sum_if(q - h) if a ≤ q ≤ b
    res otherwise
sum_if(b) = 6.84553
6.
n := 0
form_tab(a, b, h) :=
    for x ∈ grid_of_nodes
        y[n] ← x - 4
        n ← n + 1
    y
y := form_tab(a, b, h)
y = [-2; -1.4; -0.8; -0.2; 0.4; 1; 1.6; 2.2; 2.8; 3.4; 4]
swap(arr) :=
    max_el ← max(arr)
    min_el ← min(arr)
    mean_el ← mean(arr)
    for q ∈ 0 .. (length(arr) - 1)
        swaped_arr[q] ← mean_el if arr[q] == max_el
        otherwise
            swaped_arr[q] ← sqrt(sum(arr[k], k = 0 .. length(arr) - 1)) if arr[q] == min_el
            swaped_arr[q] ← arr[q] otherwise
    swaped_arr
new_y := swap(y)
new_y = [3.31662; -1.4; -0.8; -0.2; 0.4; 1; 1.6; 2.2; 2.8; 3.4; 1]
