# Вариант 11
1.
f(x) := sin(0.2 + 0.7*x)/(1.1 - cos(1.3 - 0.4*x))
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a := 0.1
b := 1.5
ε1 := 10^-3
ε2 := 10^-6
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2.
J := integral(f(x), x = a .. b)
J = 1.9223
JJ(x) := integral(f(x), x)
3.1
f2(x) := |d^2/dx^2(f(x))|
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M2 := f2(b)
M2 = 1.93898
# Т . к.
n1 ≥ sqrt((b - a)^3*M2/(12*ε1))
n1 := ceil(sqrt((b - a)^3*M2/(12*ε1)))
n1 = 22
Значит
h1 := (b - a)/n1
h1 = 0.0636364
# Т . к.
n2 ≥ sqrt((b - a)^3*M2/(12*ε2))
n2 := ceil(sqrt((b - a)^3*M2/(12*ε2)))
n2 = 666
Значит
h2 := (b - a)/n2
h2 = 0.0021021
3.2
i1 := 0 .. n1
x1[i1] := a + i1*h1
x1 = [0.1; 0.163636; 0.227273; 0.290909; 0.354545; 0.418182; 0.481818; 0.545455; 0.609091; 0.672727; 0.736364; 0.8; 0.863636; 0.927273; 0.990909; 1.05455; 1.11818; 1.18182; 1.24545; 1.30909; 1.37273; 1.43636; 1.5]
f(x1) = [0.335856; 0.401772; 0.470995; 0.543665; 0.61993; 0.699948; 0.783883; 0.87191; 0.964214; 1.06099; 1.16244; 1.26878; 1.38024; 1.49706; 1.61946; 1.74772; 1.88209; 2.02284; 2.17023; 2.32453; 2.48601; 2.65491; 2.83146]
i2 := 0 .. n2
x2[i2] := a + i2*h2
x2 =  # no stored result
f(x2) =  # no stored result
3.3
I1 := (b - a)/(2*n1)*(f(a) + 2*sum(f(x1[k]), k = 1 .. n1 - 1) + f(b))
4.
I1 = 1.92292
Δ1 := |J - I1|
Δ1 = 0.000615875
δ1 := Δ1/|I1|*100
δ1 = 0.0320282  # %
3.3
I2 := (b - a)/(2*n2)*(f(a) + 2*sum(f(x2[k]), k = 1 .. n2 - 1) + f(b))
4.
I2 = 1.9223
Δ2 := |J - I2|
Δ2 = 6.72037e-7
δ2 := Δ2/|I2|*100
δ2 = 3.496e-5  # %
# Таким образом, использование формул трапеции в задаче численного интегрирования
# позволяет получить приближенный результат очень близкий к точному значению интеграла.
5.
y(x) := (x + 1)/sqrt(x^2 + 1)*e^(-x)
c := 0.1
d := 1
ε1 := 10^-3
ε2 := 10^-6
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J_simp := integral(y(x), x = c .. d)
J_simp = 0.69793
JJ_simp(x) := integral(y(x), x)
y4(x) := |d^4/dx^4(y(x))|
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M4 := y4(c)
M4 = 8.95243
# Т . к.
n1_simp ≥ nthroot((d - c)^5*M4/(180*ε1), 4)
n1_simp := ceil(nthroot((d - c)^5*M4/(180*ε1), 4))
n1_simp = 3
n1_simp_new := n1_simp + 1
Значит
h1_simp := (d - c)/n1_simp_new
h1_simp = 0.225
# Т . к.
n2_simp ≥ nthroot((d - c)^5*M4/(180*ε2), 4)
n2_simp := ceil(nthroot((d - c)^5*M4/(180*ε2), 4))
n2_simp = 14
Значит
h2_simp := (d - c)/n2_simp
h2_simp = 0.0642857
i1_simp := 0 .. n1_simp_new
x1_simp[i1_simp] := c + i1_simp*h1_simp
x1_simp = [0.1; 0.325; 0.55; 0.775; 1]
y(x1_simp[i1_simp]) = [0.990382; 0.910471; 0.783576; 0.646361; 0.52026]
i2_simp := 0 .. n2_simp
x2_simp[i2_simp] := c + i2_simp*h2_simp
x2_simp = [0.1; 0.164286; 0.228571; 0.292857; 0.357143; 0.421429; 0.485714; 0.55; 0.614286; 0.678571; 0.742857; 0.807143; 0.871429; 0.935714; 1]
y(x2_simp[i2_simp]) = [0.990382; 0.974828; 0.95296; 0.925756; 0.894236; 0.859412; 0.822238; 0.783576; 0.74418; 0.704685; 0.66561; 0.627362; 0.59025; 0.554498; 0.52026]
I1_simp := (d - c)/(3*n1_simp_new)*(y(c) + 4*sum(y(x1_simp[k])*(mod(k, 2) ≠ 0), k = 1 .. n1_simp_new - 1) + 2*sum(y(x1_simp[k])*(mod(k, 2) == 0), k = 1 .. n1_simp_new - 1) + y(d))
I1_simp = 0.697884
Δ1_simp := |J_simp - I1_simp|
Δ1_simp = 4.58784e-5
δ1_simp := Δ1_simp/|I1_simp|*100
δ1_simp = 0.00657393  # %
I2_simp := (d - c)/(3*n2_simp)*(y(c) + 4*sum(y(x2_simp[k])*(mod(k, 2) ≠ 0), k = 1 .. n2_simp - 1) + 2*sum(y(x2_simp[k])*(mod(k, 2) == 0), k = 1 .. n2_simp - 1) + y(d))
I2_simp = 0.69793
Δ2_simp := |J_simp - I2_simp|
Δ2_simp = 2.69133e-7
δ2_simp := Δ2_simp/|I2_simp|*100
δ2_simp = 3.85617e-5  # %
# Таким образом, использование формул Симпсона в задаче численного интегрирования
# позволяет получить приближенный результат очень близкий к точному значению интеграла без непосредственного вычисления интеграла.
# Основные способы улучшить точность вычислений приближенного интеграла при численном интегрировании - это уменьшить шаг интегрирования и использовать метод численного интегрирования более высокого порядка. Поэтому метод Симпсона приведёт к более точному результату по сравнению с методом трапеций.
