# Вариант 18
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1.
f(x) := x + log(x) - 0.5
a := 0.1
b := 2
ε1 := 10^-3
ε2 := 10^-5
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2.
3.
xx := 0.5
Given
f(xx) == 0
xt := Find(xx) = 0.672383
4.
dihot(a, b, ε) :=
    n ← 0
    while |b - a| > ε
        n ← n + 1
        c ← (a + b)/2
        b ← c if f(a)*f(c) < 0
        a ← c otherwise
    stack(c, n)
dihot(a, b, ε1) = [0.672412; 11]
x1 := dihot(a, b, ε1)[0]
Δ1 := |xt - x1|
δ1 := Δ1/|x1|
δ1 = 4.30421e-5
dihot(a, b, ε2) = [0.67239; 18]
x2 := dihot(a, b, ε2)[0]
Δ2 := |xt - x2|
δ2 := Δ2/|x2|
δ2 = 1.07055e-5
hord(a, b, ε) :=
    n ← 1
    x[n - 1] ← a
    x[n] ← b
    while |x[n] - x[n - 1] > ε|
        n ← n + 1
        c ← a - (b - a)/(f(b) - f(a))
        x[n - 1] ← x[n]
        x[n] ← c
        break if f(c) == 0
        otherwise
            b ← x[n] if f(a)*f(x[n]) < 0
            a ← x[n] otherwise
    stack(c, n)
