# Вариант 18
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1.
f(x) := x + log(x) - 0.5
a := 0.1
b := 2
ε1 := 10^-3
ε2 := 10^-5
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2.
3.
xx := 0.5
Given
f(xx) == 0
xt := Find(xx) = 0.672383
4.
dihot(a, b, ε) :=
    n ← 0
    while |b - a| > ε
        n ← n + 1
        c ← (a + b)/2
        b ← c if f(a)*f(c) < 0
        a ← c otherwise
    stack(c, n)
dihot(a, b, ε1) = [0.672412; 11]
x1 := dihot(a, b, ε1)[0]
Δ1 := |xt - x1|
δ1 := Δ1/|x1|
δ1 = 4.30421e-5
dihot(a, b, ε2) = [0.67239; 18]
x2 := dihot(a, b, ε2)[0]
Δ2 := |xt - x2|
δ2 := Δ2/|x2|
δ2 = 1.07055e-5
hord(a, b, ε) :=
    n ← 1
    x[n - 1] ← a
    x[n] ← b
    while |x[n] - x[n - 1]| > ε
        n ← n + 1
        c ← a - f(a)*(b - a)/(f(b) - f(a))
        x[n] ← c
        break if f(c) == 0
        otherwise
            b ← c if f(a)*f(c) < 0
            a ← c otherwise
    stack(c, n - 1)
hord(a, b, ε1) = [0.672644; 7]
x1_hord := hord(a, b, ε1)[0]
Δ1_hord := |xt - x1_hord|
δ1_hord := Δ1_hord/|x1_hord|
δ1_hord = 0.000387433
hord(a, b, ε2) = [0.672386; 11]
x2_hord := hord(a, b, ε2)[0]
Δ2_hord := |xt - x2_hord|
δ2_hord := Δ2_hord/|x2_hord|
δ2_hord = 4.43493e-6
5.
f1(x) := d/dx(f(x))
f2(x) := d^2/dx^2(f(x))
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f(a)*f2(a) = 60.8012
f(b)*f2(b) = -0.195544
nuton(a, b, ε) :=
    n ← 0
    x[n] ← a
    n ← n + 1
    x[n] ← x[n - 1] - f(x[n - 1])/f1(x[n - 1])
    while |x[n] - x[n - 1]| > ε
        n ← n + 1
        x[n] ← x[n - 1] - f(x[n - 1])/f1(x[n - 1])
    stack(x[n], n)
nuton(a, b, ε1) = [0.672383; 4]
x1_nuton := nuton(a, b, ε1)[0]
Δ1_nuton := |xt - x1_nuton|
δ1_nuton := Δ1_nuton/|x1_nuton|
δ1_nuton = 2.06939e-7
nuton(a, b, ε2) = [0.672383; 5]
x2_nuton := nuton(a, b, ε2)[0]
Δ2_nuton := |xt - x2_nuton|
δ2_nuton := Δ2_nuton/|x2_nuton|
δ2_nuton = 8.421e-15
7.
y(x) := x^3 + 3*x + 1
d := -2
e := 1
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v := transpose([1, 3, 0, 1])
polyroots(v) = [-0.322185; 0.161093 + 1.75438i; 0.161093 - 1.75438i]
# Так как комплексные числа нельзя сравнивать с нулём, а положительные корни отсутствуют, то отделяем отрицательный корень.
xt := polyroots(v)[0] = -0.322185
dihot_al(a, b, ε) :=
    n ← 0
    while |b - a| > ε
        n ← n + 1
        c ← (a + b)/2
        b ← c if y(a)*y(c) < 0
        a ← c otherwise
    stack(c, n)
dihot_al(d, e, ε1) = [-0.322021; 12]
x1 := dihot_al(d, e, ε1)[0]
Δ1 := |xt - x1|
δ1 := Δ1/|x1|
δ1 = 0.00050888
dihot_al(d, e, ε2) = [-0.322187; 19]
x2 := dihot_al(d, e, ε2)[0]
Δ2 := |xt - x2|
δ2 := Δ2/|x2|
δ2 = 6.42198e-6
hord_al(a, b, ε) :=
    n ← 1
    x[n - 1] ← a
    x[n] ← b
    while |x[n] - x[n - 1]| > ε
        n ← n + 1
        c ← a - y(a)*(b - a)/(y(b) - y(a))
        x[n] ← c
        break if y(c) == 0
        otherwise
            b ← c if y(a)*y(c) < 0
            a ← c otherwise
    stack(c, n - 1)
hord_al(d, e, ε1) = [-0.321222; 12]
x1_hord := hord_al(d, e, ε1)[0]
Δ1_hord := |xt - x1_hord|
δ1_hord := Δ1_hord/|x1_hord|
δ1_hord = 0.0029999
hord_al(d, e, ε2) = [-0.322174; 20]
x2_hord := hord_al(d, e, ε2)[0]
Δ2_hord := |xt - x2_hord|
δ2_hord := Δ2_hord/|x2_hord|
δ2_hord = 3.45717e-5
y1(x) := d/dx(y(x))
y2(x) := d^2/dx^2(y(x))
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y(d)*y2(d) = 156
y(e)*y2(e) = 30
nuton_al(a, b, ε) :=
    n ← 0
    x[n] ← a
    n ← n + 1
    x[n] ← x[n - 1] - y(x[n - 1])/y1(x[n - 1])
    while |x[n] - x[n - 1]| > ε
        n ← n + 1
        x[n] ← x[n - 1] - y(x[n - 1])/y1(x[n - 1])
    stack(x[n], n)
nuton_al(d, e, ε1) = [-0.322185; 5]
x1_nuton := nuton_al(d, e, ε1)[0]
Δ1_nuton := |xt - x1_nuton|
δ1_nuton := Δ1_nuton/|x1_nuton|
δ1_nuton = 2.19984e-8
nuton_al(d, e, ε2) = [-0.322185; 6]
x2_nuton := nuton_al(d, e, ε2)[0]
Δ2_nuton := |xt - x2_nuton|
δ2_nuton := Δ2_nuton/|x2_nuton|
δ2_nuton = 0
# Таким образом, при анализе полученных относительных погрешностей, можно заметить, что точность вычислений увеличивается при увеличении количества итераций и при использовании методов более высокого порядка для вычисления приближенного значения корня уравнений.
