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ORIGIN := 1
1.
A := [5, 1, 0, -1; 3, -3, 1, 4; 3, 0, -2, 1; 1, -4, 0, 1]
b := [-9; -7; -16; 0]
n := rows(A) = 4
|A| = -180  # СЛАУ имеет единственное решение
xt := A^-1*b
xt = [-2; -1; 4; -2]  # точное решение СЛАУ
lsolve(A, b) = [-2; -1; 4; -2]
2.
norma(a) :=
    res ← 1
    for i ∈ 1 .. n
        if sum(|a[i, j]|, j = 1 .. n) - |a[i, i]| > |a[i, i]|
            res ← 0
            break
    res
norma(A) = 0
norm1(A) = 12
3.
new_A := [5, 1, 0, -1; 1, -4, 0, 1; -1, 1, -8, -3; 0, -3, 2, 8]
new_b := [-9; 0; -25; -5]
n := rows(new_A) = 4
norma(new_A) = 1
4.
ε1 := 10^-3
ε2 := 10^-6
Jacob(a, b, n, ε) :=
    x[:, 1] ← [0; 0; 0; 0]
    k ← 1
    m ← 1
    while m > ε
        m ← 0
        for i ∈ 1 .. n
            S ← 0
            for j ∈ 1 .. n
                S ← S + a[i, j]*x[j, k] if i ≠ j
            x[i, k + 1] ← (b[i] - S)/a[i, i]
            m ← |x[i, k + 1] - x[i, k]| if |x[i, k + 1] - x[i, k]| > m
        k ← k + 1
    [x, k]
xx1_J := Jacob(new_A, new_b, n, ε1)[1, 1]
xx1_J = [
    0, -1.8, -1.925, -1.96, -1.98313, -1.9929, -1.99687, -1.99867, -1.99942, -1.99975, -1.99989;
    0, 0, -0.60625, -0.832812, -0.927109, -0.968682, -0.986489, -0.99418, -0.99749, -0.998919, -0.999534;
    0, 3.125, 3.58438, 3.81719, 3.92156, 3.96635, 3.98542, 3.99374, 3.99729, 3.99884, 3.9995;
    0, -0.625, -1.40625, -1.74844, -1.8916, -1.95306, -1.97984, -1.99129, -1.99625, -1.99838, -1.9993
]
xx2_J := Jacob(new_A, new_b, n, ε2)[1, 1]
xx2_J = [
    0, -1.8, -1.925, -1.96, -1.98313, -1.9929, -1.99687, -1.99867, -1.99942, -1.99975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;
    0, 0, -0.60625, -0.832812, -0.927109, -0.968682, -0.986489, -0.99418, -0.99749, -0.998919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;
    0, 3.125, 3.58438, 3.81719, 3.92156, 3.96635, 3.98542, 3.99374, 3.99729, 3.99884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;
    0, -0.625, -1.40625, -1.74844, -1.8916, -1.95306, -1.97984, -1.99129, -1.99625, -1.99838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]
Zeidel(a, b, n, ε) :=
    x[:, 1] ← [0; 0; 0; 0]
    k ← 1
    m ← 1
    while m > ε
        m ← 0
        for i ∈ 1 .. n
            S ← 0
            for j ∈ 1 .. n
                S ← S + a[i, j]*x[j, k + 1] if i > j
                S ← S + a[i, j]*x[j, k] if i < j
            x[i, k + 1] ← (b[i] - S)/a[i, i]
            m ← |x[i, k + 1] - x[i, k]| if |x[i, k + 1] - x[i, k]| > m
        k ← k + 1
    [x, k]
xx1_Z := Zeidel(new_A, new_b, n, ε1)[1, 1]
xx1_Z = [
    0, -1.8, -2.03344, -2.0045, -2.00079, -2.00014, -2.00002;
    0, -0.45, -0.912656, -0.984907, -0.997416, -0.999557, -0.999924;
    0, 3.29375, 3.87154, 3.97812, 3.99625, 3.99936, 3.99989;
    0, -1.61719, -1.93513, -1.98887, -1.99809, -1.99967, -1.99994
]
xx2_Z := Zeidel(new_A, new_b, n, ε2)[1, 1]
xx2_Z = [
    0, -1.8, -2.03344, -2.0045, -2.00079, -2.00014, -2.00002, -2, -2, -2, -2;
    0, -0.45, -0.912656, -0.984907, -0.997416, -0.999557, -0.999924, -0.999987, -0.999998, -1, -1;
    0, 3.29375, 3.87154, 3.97812, 3.99625, 3.99936, 3.99989, 3.99998, 4, 4, 4;
    0, -1.61719, -1.93513, -1.98887, -1.99809, -1.99967, -1.99994, -1.99999, -2, -2, -2
]
5.
k1_J := Jacob(new_A, new_b, n, ε1)[1, 2] - 1 = 10
k2_J := Jacob(new_A, new_b, n, ε2)[1, 2] - 1 = 19
k1_Z := Zeidel(new_A, new_b, n, ε1)[1, 2] - 1 = 6
k2_Z := Zeidel(new_A, new_b, n, ε2)[1, 2] - 1 = 10
i := 1 .. n
Δ[i] := |xt[i] - xx1_J[i, k1_J + 1]|
Δ = [0.000107216; 0.000466269; 0.000502335; 0.000696521]
error(delta, xx) :=
    for i ∈ 1 .. n
        δ[i] ← delta[i]/|xx[i]|*100 if delta[i] ≠ 0
        δ[i] ← 0 otherwise
    δ
δ := error(Δ, xx1_J[:, k1_J + 1])
δ = [0.00536107; 0.0466486; 0.01256; 0.0348382]  # %
Δ[i] := |xt[i] - xx2_J[i, k2_J + 1]|
Δ = [5.49386e-8; 2.39407e-7; 2.57807e-7; 3.57832e-7]
error(delta, xx) :=
    for i ∈ 1 .. n
        δ[i] ← delta[i]/|xx[i]|*100 if delta[i] ≠ 0
        δ[i] ← 0 otherwise
    δ
δ := error(Δ, xx2_J[:, k2_J + 1])
δ = [2.74693e-6; 2.39408e-5; 6.44518e-6; 1.78916e-5]  # %
Δ[i] := |xt[i] - xx1_Z[i, k1_Z + 1]|
Δ = [2.32177e-5; 7.58879e-5; 0.00011015; 5.59955e-5]
error(delta, xx) :=
    for i ∈ 1 .. n
        δ[i] ← delta[i]/|xx[i]|*100 if delta[i] ≠ 0
        δ[i] ← 0 otherwise
    δ
δ := error(Δ, xx1_Z[:, k1_Z + 1])
δ = [0.00116087; 0.00758936; 0.00275383; 0.00279985]  # %
Δ[i] := |xt[i] - xx2_Z[i, k2_Z + 1]|
Δ = [2.00196e-8; 6.54371e-8; 9.49809e-8; 4.82841e-8]
error(delta, xx) :=
    for i ∈ 1 .. n
        δ[i] ← delta[i]/|xx[i]|*100 if delta[i] ≠ 0
        δ[i] ← 0 otherwise
    δ
δ := error(Δ, xx2_Z[:, k2_Z + 1])
δ = [1.00098e-6; 6.54371e-6; 2.37452e-6; 2.41421e-6]  # %
# Значения полученные с использованием метода Зейделя имеют большую точность по сравнению со значениями, найденными при помощи метода Якоби. Причём значения с заданной точностью при использовании метода Зейделя находятся  за меньшее количество итераций. Таким образом, метод Зейделя более эффективный по сравнению с методом Якоби.
