# Вариант 2
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1.
a := 0
b := 1
f(x, y) := x - y
y0 := 1
y[0] := 1
D(x, y) := x - y[0]
h := 0.1
n := (b - a)/h
2.
z := rkfixed(y0, a, b, n, D)
z = [
    0, 1;
    0.1, 0.909675;
    0.2, 0.837462;
    0.3, 0.781637;
    0.4, 0.740641;
    0.5, 0.713062;
    0.6, 0.697624;
    0.7, 0.693171;
    0.8, 0.698659;
    0.9, 0.71314;
    1, 0.73576
]
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3.
RK_1(a, b, h, y0) :=
    y[0] ← y0
    n ← (b - a)/h
    for k ∈ 0 .. n - 1
        x[k] ← a + k*h
        k1 ← h*f(x[k], y[k])
        k2 ← h*f(x[k] + h, y[k] + k[1])
        Δy ← (k[1] + k[2])/2
        y[k + 1] ← y[k] + Δy
    y
RK_1(a, b, h, y0) =  # error: Значение должно быть вектором.
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