# Вариант 16
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1.
f(x) := (x + 3)^2 + x^2
a := -3
b := 3
h := 0.2
n := (b - a)/h = 30
i := 0 .. n
x[i] := a + i*h
x = [
    -3; -2.8; -2.6; -2.4; -2.2; -2; -1.8; -1.6; -1.4; -1.2
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]
ff[i] := f(x[i])
ff = [
    9; 7.88; 6.92; 6.12; 5.48; 5; 4.68; 4.52; 4.52; 4.68
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]
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3.
max(f) :=
    maximum ← -1000
    for i ∈ 0 .. n
        maximum ← f[i] if f[i] > maximum
    maximum
fmax := max(ff) = 45
# Или из графика видно, что максимальное значение заданная функция принимает в правой границе исследуемого отрезка
d := 0.2*fmax = 9
4.
δ[i] := rnd(2*d) - d
δ = [
    3.28038; 3.99434; -6.7855; 6.02382; 0.306333; -1.32819; 8.08809; 0.891731; -0.50901; 6.24535
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]
y[i] := ff[i] + δ[i]
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5.
z1 := regress(x, y, 1)
z1 = [3; 3; 1; 16.0719; 5.29721]
zz1[i] := z1[3] + z1[4]*x[i]
z2 := regress(x, y, 2)
z2 = [3; 3; 2; 10.1128; 5.29721; 1.86221]
z3 := regress(x, y, 3)
z3 = [3; 3; 3; 10.1128; 4.59276; 1.86221; 0.122471]
